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/batch
! ANSYS input file written by Workbench version 18.1 RELEASE
! File used for geometry attach: C:\Users\satwi\AppData\Local\Temp\WB_DESKTOP-CMCBQSM_satwi_38904_2\unsaved_project_files\dp0\SYS\DM\SYS.scdoc
/title,unsaved_project--Torsion Test (E5)
/com,--- Data in consistent MKS units. See Solving Units in the help system for more information.
/units,MKS
/prep7
! Turn off shape checking because checks already performed inside WB mesher.
! See help system for more information.
SHPP,OFF,,NOWARN
etcon,set             ! allow ANSYS to choose best KEYOP's for 180x elements
/com,*********** Nodes for the whole assembly ***********
nblock,3,,909
(1i9,3e20.9e3)
        1   -1.239644981E-001    3.726742359E-001    1.230000000E+000
        2    1.239644981E-001    3.726742359E-001    1.230000000E+000
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-1
/com,*********** Elements for Body 1 "Extracted Beam (Circular Tube)" ***********
et,1,188
keyo,1,3,2
eblock,19,solid,,431
(19i9)
        1        1        1        1        0        0        0        0        3        0        1        1        3      397
        1        1        1        1        0        0        0        0        3        0        2        3        4      398
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-1
/com,*********** Send User Defined Coordinate System(s) ***********
csys,0
toffst,273.15,  ! Temperature offset from absolute zero
/com,*********** Set Reference Temperature ***********
tref,22.
/com,*********** Send Materials ***********
MP,DENS,1,7820,	! kg m^-3
MP,ALPX,1,1.2e-05,	! C^-1
MP,C,1,434,	! J kg^-1 C^-1
MP,KXX,1,60.5,	! W m^-1 C^-1
MP,RSVX,1,1.7e-07,	! kg m^3 A^-2 s^-3
MP,EX,1,205000000000,	! Pa
MP,NUXY,1,0.3,
MP,MURX,1,10000,

/com,*********** Send Beam Properties ***********
SECTYPE,1,BEAM,CTUB
SECDATA,1.6e-002,1.75e-002

secoffset,cent
!************************* Model Summary ********************
!Extracted Beam (Circular Tube),	Structural Steel Alloy,	matid,	1
!************************* End Model Summary ********************
/com,*********** Simple Supports ***********
CMBLOCK,_SIMPLSU,NODE,        4
(8i10)
       239       250       298       303
cmsel,s,_SIMPLSU
d,all,ux,0
d,all,uy,0
d,all,uz,0
nsel,all
/com,*********** Define Vertex Force Using Follower Elements ***********
et,2,201
keyo,2,1,1           ! Keep the direction constant
keyo,2,2,1           ! Apply Forces only, not moment
mat,2
real,2
type,2
en,432,103
en,433,109
en,434,114
en,435,282
r,2
rmod,2,1,1.0,              ! FX
mat,3
real,3
type,2
en,436,103
en,437,109
en,438,114
en,439,282
r,3
rmod,3,2,1.0,              ! FY
mat,4
real,4
type,2
en,440,103
en,441,109
en,442,114
en,443,282
r,4
rmod,4,3,1.0,              ! FZ

*DIM,_loadvari29x,TABLE,2,1,1,TIME,
! Time values
_loadvari29x(1,0,1) = 0.
_loadvari29x(2,0,1) = 1.
! Load values
_loadvari29x(1,1,1) = 0.
_loadvari29x(2,1,1) = 0.


*DIM,_loadvari29y,TABLE,2,1,1,TIME,
! Time values
_loadvari29y(1,0,1) = 0.
_loadvari29y(2,0,1) = 1.
! Load values
_loadvari29y(1,1,1) = 0.
_loadvari29y(2,1,1) = 1250.


*DIM,_loadvari29z,TABLE,2,1,1,TIME,
! Time values
_loadvari29z(1,0,1) = 0.
_loadvari29z(2,0,1) = 1.
! Load values
_loadvari29z(1,1,1) = 0.
_loadvari29z(2,1,1) = 0.

/com,*********** Define Vertex Force Using Follower Elements ***********
et,5,201
keyo,5,1,1           ! Keep the direction constant
keyo,5,2,1           ! Apply Forces only, not moment
mat,5
real,5
type,5
en,444,257
en,445,261
en,446,267
en,447,384
r,5
rmod,5,1,1.0,              ! FX
mat,6
real,6
type,5
en,448,257
en,449,261
en,450,267
en,451,384
r,6
rmod,6,2,1.0,              ! FY
mat,7
real,7
type,5
en,452,257
en,453,261
en,454,267
en,455,384
r,7
rmod,7,3,1.0,              ! FZ

*DIM,_loadvari31x,TABLE,2,1,1,TIME,
! Time values
_loadvari31x(1,0,1) = 0.
_loadvari31x(2,0,1) = 1.
! Load values
_loadvari31x(1,1,1) = 0.
_loadvari31x(2,1,1) = 0.


*DIM,_loadvari31y,TABLE,2,1,1,TIME,
! Time values
_loadvari31y(1,0,1) = 0.
_loadvari31y(2,0,1) = 1.
! Load values
_loadvari31y(1,1,1) = 0.
_loadvari31y(2,1,1) = -1250.


*DIM,_loadvari31z,TABLE,2,1,1,TIME,
! Time values
_loadvari31z(1,0,1) = 0.
_loadvari31z(2,0,1) = 1.
! Load values
_loadvari31z(1,1,1) = 0.
_loadvari31z(2,1,1) = 0.

fini
/com,****************************************************************************
/com,*************************    SOLUTION       ********************************
/com,****************************************************************************
/solu
antype,0                   ! static analysis
eqsl,sparse,,,,,1
cntr,print,1               ! print out contact info and also make no initial contact an error
dmpoption,emat,no             ! Don't combine emat file for DANSYS
dmpoption,esav,no             ! Don't combine esav file for DANSYS
nldiag,cont,iter           ! print out contact info each equilibrium iteration
rescontrol,,none                 ! Do not keep any restart files
/com,****************************************************
/com,******************* SOLVE FOR LS 1 OF 1 ****************
esel,s,real,,2
sfe,all,1,pres,1,%_loadvari29x%
esel,s,real,,3
sfe,all,1,pres,1,%_loadvari29y%
esel,s,real,,4
sfe,all,1,pres,1,%_loadvari29z%
esel,s,real,,5
sfe,all,1,pres,1,%_loadvari31x%
esel,s,real,,6
sfe,all,1,pres,1,%_loadvari31y%
esel,s,real,,7
sfe,all,1,pres,1,%_loadvari31z%
esel,all
nsub,1,1,1
time,1.
outres,erase
outres,all,none
outres,nsol,all
outres,rsol,all
outres,strs,all
outres,epel,all
outres,eppl,all
esel,s,mat,,1
cm,_elmisc,elem
esel,all
outres,misc,all,_elmisc
stabilize,off                   ! Stabilization turned OFF by user
! *********** WB SOLVE COMMAND ***********
! check interactive state
*get,ANSINTER_,active,,int
*if,ANSINTER_,ne,0,then
/eof
*endif
solve
/com *************** Write FE CONNECTORS *********
CEWRITE,file,ce,,INTE
/com,****************************************************
/com,*************** FINISHED SOLVE FOR LS 1 *************
/post1
fini
