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/batch
! ANSYS input file written by Workbench version 18.1 RELEASE
! File used for geometry attach: C:\Users\satwi\AppData\Local\Temp\WB_DESKTOP-CMCBQSM_satwi_38904_2\unsaved_project_files\dp0\SYS\DM\SYS.scdoc
/title,unsaved_project--Modal (G5)
/com,--- Data in consistent MKS units. See Solving Units in the help system for more information.
/units,MKS
/prep7
! Turn off shape checking because checks already performed inside WB mesher.
! See help system for more information.
SHPP,OFF,,NOWARN
etcon,set             ! allow ANSYS to choose best KEYOP's for 180x elements
/com,*********** Nodes for the whole assembly ***********
nblock,3,,909
(1i9,3e20.9e3)
        1   -1.239644981E-001    3.726742359E-001    1.230000000E+000
        2    1.239644981E-001    3.726742359E-001    1.230000000E+000
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-1
/com,*********** Elements for Body 1 "Extracted Beam (Circular Tube)" ***********
et,1,188
keyo,1,3,2
eblock,19,solid,,431
(19i9)
        1        1        1        1        0        0        0        0        3        0        1        1        3      397
        1        1        1        1        0        0        0        0        3        0        2        3        4      398
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-1
/com,*********** Send User Defined Coordinate System(s) ***********
csys,0
toffst,273.15,  ! Temperature offset from absolute zero
/com,*********** Set Reference Temperature ***********
tref,22.
/com,*********** Send Materials ***********
MP,DENS,1,7820,	! kg m^-3
MP,ALPX,1,1.2e-05,	! C^-1
MP,C,1,434,	! J kg^-1 C^-1
MP,KXX,1,60.5,	! W m^-1 C^-1
MP,RSVX,1,1.7e-07,	! kg m^3 A^-2 s^-3
MP,EX,1,205000000000,	! Pa
MP,NUXY,1,0.3,
MP,MURX,1,10000,

/com,*********** Send Beam Properties ***********
SECTYPE,1,BEAM,CTUB
SECDATA,1.6e-002,1.75e-002

secoffset,cent
!************************* Model Summary ********************
!Extracted Beam (Circular Tube),	Structural Steel Alloy,	matid,	1
!************************* End Model Summary ********************
/com,*********** Fixed Supports ***********
CMBLOCK,_FIXEDSU,NODE,        4
(8i10)
        42       122       136       223
cmsel,s,_FIXEDSU
d,all,all
nsel,all
fini
/solu
antype,2                   ! modal analysis
modopt,lanb,6
outres,erase
outres,all,none
outres,nsol,all
outres,strs,all
outres,nload,all
outres,misc,all
mxpand,,,,yes,,no             ! expand element results for stress/strains, but not write them to file.mode
! *********** WB SOLVE COMMAND ***********
! check interactive state
*get,ANSINTER_,active,,int
*if,ANSINTER_,ne,0,then
/eof
*endif
solve
/com *************** Write FE CONNECTORS *********
CEWRITE,file,ce,,INTE
*get,_nmodalsolproc,active,0,numcpu
fini
/post1
*dim,_direction,CHAR,6,1
_direction(1) = 'X'
_direction(2) = 'Y'
_direction(3) = 'Z'
_direction(4) = 'ROTX'
_direction(5) = 'ROTY'
_direction(6) = 'ROTZ'
*get,_lastLS,active,0,set,LSTP
*get,_beginset,active,0,set,nset,first,_lastLS
*get,_endset,active,0,set,nset,last,_lastLS
_nummodes = _endset - _beginset + 1
*do,i_mode,1,_nummodes
   *do,j_component,1,6
			*get,PFACT_%i_mode%_%j_component%,MODE,%i_mode%,PFACT,,DIREC,_direction(%j_component%)
   *enddo
*enddo
fini
